<neuroml xmlns="http://www.neuroml.org/schema/neuroml2"  xmlns:xs="http://www.w3.org/2001/XMLSchema" xmlns:xsi="http://www.w3.org/2001/XMLSchema-instance" xsi:schemaLocation="http://www.neuroml.org/schema/neuroml2 https://raw.github.com/NeuroML/NeuroML2/development/Schemas/NeuroML2/NeuroML_v2beta5.xsd" id="ChristmasTree">
    <notes>Happy holidays!</notes>
    <ionChannel id="pas" type="ionChannelPassive" conductance="10pS"/>
    <cell id="Base">
        <notes>Base</notes>
        <morphology id="mm">
            <segment id="0" name="0">
                <proximal x="0.000000e+00" y="0.000000e+00" z="0.000000e+00" diameter="20"/>
                <distal x="0.000000e+00" y="3.000000e+00" z="0.000000e+00" diameter="20"/>
            </segment>
            <segment id="1" name="1">
                <parent segment="0" fractionAlong="1"/>
                <proximal x="0.000000e+00" y="3.000000e+00" z="0.000000e+00" diameter="20"/>
                <distal x="0.000000e+00" y="2.000000e+01" z="0.000000e+00" diameter="40"/>
            </segment>
            <segment id="2" name="2">
                <parent segment="1" fractionAlong="1"/>
                <proximal x="0.000000e+00" y="2.000000e+01" z="0.000000e+00" diameter="20"/>
                <distal x="0.000000e+00" y="2.200000e+01" z="0.000000e+00" diameter="40"/>
            </segment>
            <segmentGroup id="all">
                <member segment="0"/>
                <member segment="1"/>
                <member segment="2"/>
            </segmentGroup>
            <segmentGroup id="SG_0">
                <member segment="0"/>
            </segmentGroup>
            <segmentGroup id="SG_1">
                <member segment="1"/>
            </segmentGroup>
            <segmentGroup id="SG_2">
                <member segment="2"/>
            </segmentGroup>
        </morphology>
        <biophysicalProperties id="bp">
            <membraneProperties>
                <channelDensity id="pas_all" ionChannel="pas" condDensity="1 mS_per_cm2" erev="-65.0 mV" ion="non_specific"/>
                <specificCapacitance value="1.5 uF_per_cm2"/>
                <initMembPotential value="-65.0 mV"/>
            </membraneProperties>
            <intracellularProperties>
                <resistivity value="0.07 kohm_cm"/>
            </intracellularProperties>
        </biophysicalProperties>
    </cell>
    <cell id="branches">
        <notes>branches</notes>
        <morphology id="mm">
            <segment id="0" name="0">
                <proximal x="0.000000e+00" y="2.000000e+01" z="0.000000e+00" diameter="5"/>
                <distal x="0.000000e+00" y="2.000000e+02" z="0.000000e+00" diameter="5"/>
            </segment>
            <segment id="1" name="1">
                <parent segment="0" fractionAlong="1"/>
                <proximal x="0.000000e+00" y="2.000000e+02" z="0.000000e+00" diameter="5"/>
                <distal x="0.000000e+00" y="2.100000e+02" z="0.000000e+00" diameter="5"/>
            </segment>
            <segmentGroup id="all">
                <member segment="0"/>
                <member segment="1"/>
            </segmentGroup>
            <segmentGroup id="SG_0">
                <member segment="0"/>
            </segmentGroup>
            <segmentGroup id="SG_1">
                <member segment="1"/>
            </segmentGroup>
        </morphology>
        <biophysicalProperties id="bp">
            <membraneProperties>
                <channelDensity id="pas_all" ionChannel="pas" condDensity="1 mS_per_cm2" erev="-65.0 mV" ion="non_specific"/>
                <specificCapacitance value="1.5 uF_per_cm2"/>
                <initMembPotential value="-65.0 mV"/>
            </membraneProperties>
            <intracellularProperties>
                <resistivity value="0.07 kohm_cm"/>
            </intracellularProperties>
        </biophysicalProperties>
    </cell>
    <cell id="pines">
        <notes>pines</notes>
        <morphology id="mm">
            <segment id="0" name="i_0_j_0">
                <proximal x="0.000000e+00" y="4.000000e+01" z="0.000000e+00" diameter="25.0"/>
                <distal x="0.000000e+00" y="2.600000e+01" z="8.500000e+01" diameter="0.2"/>
            </segment>
            <segment id="1" name="i_1_j_0">
                <parent segment="0" fractionAlong="1"/>
                <proximal x="0.000000e+00" y="4.000000e+01" z="0.000000e+00" diameter="25.0"/>
                <distal x="4.595447e+01" y="2.600000e+01" z="7.150655e+01" diameter="0.2"/>
            </segment>
            <segment id="2" name="i_2_j_0">
                <parent segment="1" fractionAlong="1"/>
                <proximal x="0.000000e+00" y="4.000000e+01" z="0.000000e+00" diameter="25.0"/>
                <distal x="7.731872e+01" y="2.600000e+01" z="3.531028e+01" diameter="0.2"/>
            </segment>
            <segment id="3" name="i_3_j_0">
                <parent segment="2" fractionAlong="1"/>
                <proximal x="0.000000e+00" y="4.000000e+01" z="0.000000e+00" diameter="25.0"/>
                <distal x="8.413482e+01" y="2.600000e+01" z="-1.209676e+01" diameter="0.2"/>
            </segment>
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            <segmentGroup id="all">
                <member segment="0"/>
                <member segment="1"/>
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            </segmentGroup>
            <segmentGroup id="SG_0">
                <member segment="0"/>
            </segmentGroup>
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        </morphology>
        <biophysicalProperties id="bp">
            <membraneProperties>
                <channelDensity id="pas_all" ionChannel="pas" condDensity="1 mS_per_cm2" erev="-65.0 mV" ion="non_specific"/>
                <specificCapacitance value="1.5 uF_per_cm2"/>
                <initMembPotential value="-65.0 mV"/>
            </membraneProperties>
            <intracellularProperties>
                <resistivity value="0.07 kohm_cm"/>
            </intracellularProperties>
        </biophysicalProperties>
    </cell>
    <cell id="Star">
        <notes>Star</notes>
        <morphology id="mm">
            <segment id="0" name="0">
                <proximal x="0.000000e+00" y="2.300000e+02" z="0.000000e+00" diameter="5"/>
                <distal x="0.000000e+00" y="2.500000e+02" z="0.000000e+00" diameter="0.2"/>
            </segment>
            <segment id="1" name="1">
                <parent segment="0" fractionAlong="1"/>
                <proximal x="0.000000e+00" y="2.300000e+02" z="0.000000e+00" diameter="5"/>
                <distal x="1.902113e+01" y="2.361803e+02" z="0.000000e+00" diameter="0.2"/>
            </segment>
            <segment id="2" name="2">
                <parent segment="1" fractionAlong="1"/>
                <proximal x="0.000000e+00" y="2.300000e+02" z="0.000000e+00" diameter="5"/>
                <distal x="1.175571e+01" y="2.138197e+02" z="0.000000e+00" diameter="0.2"/>
            </segment>
            <segment id="3" name="3">
                <parent segment="2" fractionAlong="1"/>
                <proximal x="0.000000e+00" y="2.300000e+02" z="0.000000e+00" diameter="5"/>
                <distal x="-1.175571e+01" y="2.138197e+02" z="0.000000e+00" diameter="0.2"/>
            </segment>
            <segment id="4" name="4">
                <parent segment="3" fractionAlong="1"/>
                <proximal x="0.000000e+00" y="2.300000e+02" z="0.000000e+00" diameter="5"/>
                <distal x="-1.902113e+01" y="2.361803e+02" z="0.000000e+00" diameter="0.2"/>
            </segment>
            <segmentGroup id="all">
                <member segment="0"/>
                <member segment="1"/>
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            </segmentGroup>
            <segmentGroup id="SG_0">
                <member segment="0"/>
            </segmentGroup>
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        </morphology>
        <biophysicalProperties id="bp">
            <membraneProperties>
                <channelDensity id="pas_all" ionChannel="pas" condDensity="1 mS_per_cm2" erev="-65.0 mV" ion="non_specific"/>
                <specificCapacitance value="1.5 uF_per_cm2"/>
                <initMembPotential value="-65.0 mV"/>
            </membraneProperties>
            <intracellularProperties>
                <resistivity value="0.07 kohm_cm"/>
            </intracellularProperties>
        </biophysicalProperties>
    </cell>
    <network id="ChristmasTree">
        <notes>Happy holidays!</notes>
        <population id="Pop_Base" component="Base" size="1" type="populationList">
            <instance id="0">
                <location x="0." y="0." z="0."/>
            </instance>
        </population>
        <population id="Pop_branches" component="branches" size="1" type="populationList">
            <instance id="0">
                <location x="0." y="0." z="0."/>
            </instance>
        </population>
        <population id="Pop_pines" component="pines" size="1" type="populationList">
            <instance id="0">
                <location x="0." y="0." z="0."/>
            </instance>
        </population>
        <population id="Pop_Star" component="Star" size="1" type="populationList">
            <instance id="0">
                <location x="0." y="0." z="0."/>
            </instance>
        </population>
    </network>
</neuroml>
